18.10.2023
19:18
$PROBLEM sufentanil_epidural

$INPUT ID TIME AMT RATE DV CMT MDV EVID SEX AGE WT HEIGHT TINFS TINFR DOSES DOSER OUT NUM

$DATA ../../../../data/derived/nonmem_data_v02.csv
IGNORE=I
IGNORE=(OUT.EQ.1)
IGNORE=(CMT.EQ.22)
IGNORE=(CMT.EQ.33)

$SUBROUTINES ADVAN13 TOL=6

$MODEL
  COMP  = (ABS)
  COMP  = (CENTRAL)
  COMP  = (PERIPHERAL)
  COMP  = (ABS2)

$PK
;PK PARAMETERS
 CL = THETA(1)*EXP(ETA(1))
 V1 = THETA(2)*EXP(ETA(2))
 Q  = THETA(3)*EXP(ETA(3))
 V2 = THETA(4)*EXP(ETA(4))
 KA = THETA(5)*EXP(ETA(5))
 K14= THETA(6)*EXP(ETA(6))
 K41= THETA(7)*EXP(ETA(7))
 BIO = THETA(8)

;SECONDARY PARAMETERS
 K20 = CL/V1;
 K23 = Q/V1;
 K32 = Q/V2;

$DES
 DADT(1) = -KA*A(1)-K14*A(1)+K41*A(4)
 DADT(2) =  BIO*KA*A(1)-K23*A(2)+K32*A(3)-K20*A(2)
 DADT(3) =          K23*A(2)-K32*A(3)
 DADT(4) =          K14*A(1)-K41*A(4)

$ERROR

IPRED = A(2)/V1*1000 ;ug/L->ng/L=pg/ml
Y=IPRED*(1+EPS(2))+EPS(1)

$THETA
; https://pubmed.ncbi.nlm.nih.gov/26105145/
; VC = 7.90 l, VT = 481 L, Cl = 45.3 L/h, and Q = 38.3 L/h
45.3 FIX    ;[L/h] CL
7.90 FIX    ;[L] V1
38.3 FIX    ;[L/h] Q
481 FIX     ;[L] V2
(0,10)      ;[1/h] KA
(0,10)     ;[1/h] K14
(0,0.147)     ;[1/h] K41
(0,0.9,1)     ;[] BIO

$OMEGA
0.239121 FIX  ;[P] ETA-CL
0 FIX ;[P] ETA-V1
0.3721 FIX ;[P] ETA-Q
1.44 FIX ;[P] ETA-V2
0 FIX   ;[P] ETA-KA
0 FIX   ;[P] ETA-K14
0.2 ;[P] ETA-K41

$SIGMA
(0.01 FIX)  ;[P] ADD pg/ml
(0.23)       ;[P] PROP

$EST MAXEVAL=9999 METHOD=1 INTER SIGL=6 NSIG=2 PRINT=1 MSFO=./1.msf
$COV PRINT=E MATRIX=R

$TABLE NUM ID TIME EVID MDV CMT PRED IPRED CWRES WRES NPDE NOPRINT NOAPPEND ONEHEADERALL
FILE=sdtab1.tab
$TABLE NUM ID ETAS(1:LAST) KA CL V1 Q V2 K14 K41 NOPRINT NOAPPEND ONEHEADERALL
FILE=patab1.tab

NM-TRAN MESSAGES
 WARNINGS AND ERRORS (IF ANY) FOR PROBLEM    1
 (WARNING  2) NM-TRAN INFERS THAT THE DATA ARE POPULATION.
 LIM VALUES MAXLIM ASSESSED BY NMTRAN: 1,2,3,4,5,6,7,8,10,11,13,15,16

1NONLINEAR MIXED EFFECTS MODEL PROGRAM (NONMEM) VERSION 7.4.4
 ORIGINALLY DEVELOPED BY STUART BEAL, LEWIS SHEINER, AND ALISON BOECKMANN
 CURRENT DEVELOPERS ARE ROBERT BAUER, ICON DEVELOPMENT SOLUTIONS,
 AND ALISON BOECKMANN. IMPLEMENTATION, EFFICIENCY, AND STANDARDIZATION
 PERFORMED BY NOUS INFOSYSTEMS.
 PROBLEM NO.:         1
 sufentanil_epidural
 TOT. NO. OF OBS RECS:      244
 TOT. NO. OF INDIVIDUALS:       18
 GENERAL NONLINEAR KINETICS MODEL WITH STIFF/NONSTIFF EQUATIONS (LSODA, ADVAN13)
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 #TBLN:      1
 #METH: First Order Conditional Estimation with Interaction
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
 #TERM:
0MINIMIZATION SUCCESSFUL
 NO. OF FUNCTION EVALUATIONS USED:      363
 NO. OF SIG. DIGITS IN FINAL EST.:  2.1

 ETABAR IS THE ARITHMETIC MEAN OF THE ETA-ESTIMATES,
 AND THE P-VALUE IS GIVEN FOR THE NULL HYPOTHESIS THAT THE TRUE MEAN IS 0.

 ETABAR:         5.6449E-02  0.0000E+00  3.8491E-01  2.2217E-01  0.0000E+00  0.0000E+00  2.9700E-02
 SE:             1.0574E-01  0.0000E+00  1.7333E-01  1.7339E-01  0.0000E+00  0.0000E+00  4.7431E-02
 N:                      18          18          18          18          18          18          18

 P VAL.:         5.9345E-01  1.0000E+00  2.6373E-02  2.0008E-01  1.0000E+00  1.0000E+00  5.3119E-01

 ETASHRINKSD(%)  5.5975E+00  1.0000E+02  1.0000E-10  3.6919E+01  1.0000E+02  1.0000E+02  4.4867E+01
 ETASHRINKVR(%)  1.0882E+01  1.0000E+02  1.0000E-10  6.0208E+01  1.0000E+02  1.0000E+02  6.9603E+01
 EBVSHRINKSD(%)  9.0267E+00  0.0000E+00  2.0703E+01  2.8613E+01  0.0000E+00  0.0000E+00  4.8368E+01
 EBVSHRINKVR(%)  1.7239E+01  0.0000E+00  3.7120E+01  4.9039E+01  0.0000E+00  0.0000E+00  7.3341E+01
 EPSSHRINKSD(%)  6.4378E+00  6.4378E+00
 EPSSHRINKVR(%)  1.2461E+01  1.2461E+01


 TOTAL DATA POINTS NORMALLY DISTRIBUTED (N):          244
 N*LOG(2PI) CONSTANT TO OBJECTIVE FUNCTION:    448.44200420388029
 OBJECTIVE FUNCTION VALUE WITHOUT CONSTANT:    876.60099768360601
 OBJECTIVE FUNCTION VALUE WITH CONSTANT:       1325.0430018874863
 REPORTED OBJECTIVE FUNCTION DOES NOT CONTAIN CONSTANT

 TOTAL EFFECTIVE ETAS (NIND*NETA):                            72


 #TERE:
 Elapsed estimation  time in seconds:   453.83
 WARNING: R MATRIX ADJUSTED TO BE MADE POSITIVE DEFINITE.
 INTERPRET VARIANCE-COVARIANCE OF ESTIMATES WITH CARE.
 Elapsed covariance  time in seconds:   158.21
 Elapsed postprocess time in seconds:    14.69

 ********************               FIRST ORDER CONDITIONAL ESTIMATION WITH INTERACTION              ********************
 #OBJT:**************                       MINIMUM VALUE OF OBJECTIVE FUNCTION                      ********************
 #OBJV:********************************************      876.601       **************************************************

 ********************               FIRST ORDER CONDITIONAL ESTIMATION WITH INTERACTION              ********************
 ********************                             FINAL PARAMETER ESTIMATE                           ********************

 THETA - VECTOR OF FIXED EFFECTS PARAMETERS   *********
         TH 1      TH 2      TH 3      TH 4      TH 5      TH 6      TH 7      TH 8
         4.53E+01  7.90E+00  3.83E+01  4.81E+02  1.90E+03  7.16E+03  1.66E-01  6.24E-01

 OMEGA - COV MATRIX FOR RANDOM EFFECTS - ETAS  ********
         ETA1      ETA2      ETA3      ETA4      ETA5      ETA6      ETA7
 ETA1
+        2.39E-01
 ETA2
+        0.00E+00  0.00E+00
 ETA3
+        0.00E+00  0.00E+00  3.72E-01
 ETA4
+        0.00E+00  0.00E+00  0.00E+00  1.44E+00
 ETA5
+        0.00E+00  0.00E+00  0.00E+00  0.00E+00  0.00E+00
 ETA6
+        0.00E+00  0.00E+00  0.00E+00  0.00E+00  0.00E+00  0.00E+00
 ETA7
+        0.00E+00  0.00E+00  0.00E+00  0.00E+00  0.00E+00  0.00E+00  1.41E-01

 SIGMA - COV MATRIX FOR RANDOM EFFECTS - EPSILONS  ****
         EPS1      EPS2
 EPS1
+        1.00E-02
 EPS2
+        0.00E+00  1.77E-01

 OMEGA - CORR MATRIX FOR RANDOM EFFECTS - ETAS  *******
         ETA1      ETA2      ETA3      ETA4      ETA5      ETA6      ETA7
 ETA1
+        4.89E-01
 ETA2
+        0.00E+00  0.00E+00
 ETA3
+        0.00E+00  0.00E+00  6.10E-01
 ETA4
+        0.00E+00  0.00E+00  0.00E+00  1.20E+00
 ETA5
+        0.00E+00  0.00E+00  0.00E+00  0.00E+00  0.00E+00
 ETA6
+        0.00E+00  0.00E+00  0.00E+00  0.00E+00  0.00E+00  0.00E+00
 ETA7
+        0.00E+00  0.00E+00  0.00E+00  0.00E+00  0.00E+00  0.00E+00  3.76E-01

 SIGMA - CORR MATRIX FOR RANDOM EFFECTS - EPSILONS  ***
         EPS1      EPS2
 EPS1
+        1.00E-01
 EPS2
+        0.00E+00  4.21E-01

 ********************               FIRST ORDER CONDITIONAL ESTIMATION WITH INTERACTION              ********************
 ********************                            STANDARD ERROR OF ESTIMATE                          ********************

 THETA - VECTOR OF FIXED EFFECTS PARAMETERS   *********
         TH 1      TH 2      TH 3      TH 4      TH 5      TH 6      TH 7      TH 8
        ......... ......... ......... .........  4.45E+03  1.66E+04  2.03E-02  6.86E-02

 OMEGA - COV MATRIX FOR RANDOM EFFECTS - ETAS  ********
         ETA1      ETA2      ETA3      ETA4      ETA5      ETA6      ETA7
 ETA1
+       .........
 ETA2
+       ......... .........
 ETA3
+       ......... ......... .........
 ETA4
+       ......... ......... ......... .........
 ETA5
+       ......... ......... ......... ......... .........
 ETA6
+       ......... ......... ......... ......... ......... .........
 ETA7
+       ......... ......... ......... ......... ......... .........  2.28E-01

 SIGMA - COV MATRIX FOR RANDOM EFFECTS - EPSILONS  ****
         EPS1      EPS2
 EPS1
+       .........
 EPS2
+       .........  8.73E-03

 OMEGA - CORR MATRIX FOR RANDOM EFFECTS - ETAS  *******
         ETA1      ETA2      ETA3      ETA4      ETA5      ETA6      ETA7
 ETA1
+       .........
 ETA2
+       ......... .........
 ETA3
+       ......... ......... .........
 ETA4
+       ......... ......... ......... .........
 ETA5
+       ......... ......... ......... ......... .........
 ETA6
+       ......... ......... ......... ......... ......... .........
 ETA7
+       ......... ......... ......... ......... ......... .........  3.04E-01

 SIGMA - CORR MATRIX FOR RANDOM EFFECTS - EPSILONS  ***
         EPS1      EPS2
 EPS1
+       .........
 EPS2
+       .........  1.04E-02
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
 ********************               FIRST ORDER CONDITIONAL ESTIMATION WITH INTERACTION              ********************
 ********************                      EIGENVALUES OF COR MATRIX OF ESTIMATE                     ********************

             1         2         3         4         5         6
         6.24E-04  2.51E-01  7.65E-01  9.50E-01  1.83E+00  2.20E+00
 Elapsed finaloutput time in seconds:     2.12
 #CPUT: Total CPU Time in Seconds,      775.953
